# OpenSim document version 30000
AnalyzeTool ***:
  replace_force_set: false
  results_directory: Analysis
  output_precision: 8
  initial_time: -1
  final_time: -1
  solve_for_equilibrium_for_auxiliary_states: false
  maximum_number_of_integrator_steps: 20000
  maximum_integrator_step_size: 1
  minimum_integrator_step_size: 1e-8
  integrator_error_tolerance: 1e-5
  coordinates_file: ***_IK.mot
  lowpass_cutoff_frequency_for_coordinates: -1
  AnalysisSet Analyses:
    Kinematics: start_time=0.017023 end_time=4442.86 step_interval=1 in_degrees=true
    MuscleAnalysis: start_time=0.017023 end_time=4442.86 step_interval=1 in_degrees=true muscle_list=all
        moment_arm_coordinate_list=all compute_moments=false
    PointKinematics: start_time=0.017023 end_time=4442.86 step_interval=1 in_degrees=true body_name=hand
        relative_to_body_name=ground point_name=hand point=(0 0 0)
    PointKinematics: start_time=0.017023 end_time=4442.86 step_interval=1 in_degrees=true body_name=radius
        relative_to_body_name=ground point_name=elbow point=(0 0 0)
