# OpenSim document version 20302
AnalyzeTool subject01_walk1:
  model_file: D:\Lab\GIT\monkeyArmModel\monkeyArm_current.osim
  replace_force_set: false
  results_directory: ../AnalyzeResults
  output_precision: 8
  initial_time: 0.8
  final_time: 1.18
  solve_for_equilibrium_for_auxiliary_states: false
  maximum_number_of_integrator_steps: 20000
  maximum_integrator_step_size: 1
  minimum_integrator_step_size: 0.00000001
  integrator_error_tolerance: 0.00001
  coordinates_file: ../subject01_walk1_ik.mot
  lowpass_cutoff_frequency_for_coordinates: -1
  AnalysisSet Analyses:
    Kinematics: start_time=-infinity end_time=infinity step_interval=1 in_degrees=true coordinates=all
    PointKinematics: start_time=0.017023 end_time=4442.86 step_interval=1 in_degrees=true body_name=hand
        relative_to_body_name=ground point_name=hand point=(0 0 0)
    PointKinematics: start_time=0.017023 end_time=4442.86 step_interval=1 in_degrees=true body_name=radius
        relative_to_body_name=ground point_name=elbow point=(0 0 0)
