# OpenSim document version 30000
ScaleTool scaled_model:
  mass: 11.2 [kg]
  height: -1
  age: -1
  ModelScaler:
    apply: true
    scaling_order: measurements manualScale
    marker_file: ***_markerData.trc
    time_range: 0 1
    preserve_mass_distribution: true
    MeasurementSet:
      Measurement humerus: apply=true
        MarkerPair: markers=(Shoulder_JC Pronation_Pt1)
        BodyScale humerus: axes=(X Y Z)
      Measurement radius: apply=true
        MarkerPair: markers=(Pronation_Pt1 Marker_4)
        BodyScale radius_jcc: axes=(X Y Z)
        BodyScale radius: axes=(X Y Z)
        BodyScale radius1: axes=(X Y Z)
      Measurement ulna: apply=true
        MarkerPair: markers=(Marker_6 Marker_5)
        BodyScale ulna1: axes=(X Y Z)
        BodyScale ulna: axes=(X Y Z)
    ScaleSet:
      Scale: scales=(1.25 1.25 1.25) segment=ground apply=true
      Scale: scales=(1.25 1.25 1.25) segment=sternum apply=true
      Scale: scales=(1.25 1.25 1.25) segment=clavicle apply=true
      Scale: scales=(1.25 1.25 1.25) segment=scapula apply=true
      Scale: scales=(1.25 1.25 1.25) segment=hand apply=true
  MarkerPlacer:
    apply: true
    marker_file: ***_markerData.trc
    time_range: 2 3
    max_marker_movement: -1
    IKTaskSet:
      IKMarkerTask Marker_8: apply=true weight=1
      IKMarkerTask Marker_7: apply=true weight=1
      IKMarkerTask Marker_6: apply=true weight=1
      IKMarkerTask Marker_4: apply=true weight=1
      IKMarkerTask Marker_5: apply=true weight=1
      IKMarkerTask Marker_2: apply=true weight=1
      IKMarkerTask Marker_3: apply=true weight=1
      IKMarkerTask Marker_1: apply=true weight=1
      IKMarkerTask Shoulder_JC: apply=true weight=0
      IKMarkerTask Pronation_Pt1: apply=true weight=0
